# OpenSim document version 40000
ScaleTool:
  mass: 62 [kg]
  height: -1
  age: -1
  GenericModelMaker:
    model_file: ..\..\OpensimModel\LaiArnold2017_refined_Fukuchi2017-running.osim
  ModelScaler:
    apply: true
    scaling_order: measurements
    marker_file: RBDS001static.trc
    time_range: 0 0.5
    preserve_mass_distribution: true
    output_model_file: RBDS001_scaledModel.osim
    output_scale_file: RBDS001_scaleSet.xml
    MeasurementSet:
      Measurement pelvis_w: apply=true
        MarkerPair: markers=(R.ASIS L.ASIS)
        MarkerPair: markers=(R.PSIS L.PSIS)
        BodyScale pelvis: axes=Z
      Measurement pelvis_d: apply=true
        MarkerPair: markers=(R.ASIS R.PSIS)
        MarkerPair: markers=(L.ASIS L.PSIS)
        BodyScale pelvis: axes=X
      Measurement pelvis_h: apply=true
        MarkerPair: markers=(R.ASIS R.GTR)
        MarkerPair: markers=(L.ASIS L.GTR)
        MarkerPair: markers=(R.PSIS R.GTR)
        MarkerPair: markers=(L.PSIS L.GTR)
        MarkerPair: markers=(R.Iliac.Crest R.GTR)
        MarkerPair: markers=(L.Iliac.Crest L.GTR)
        BodyScale pelvis: axes=Y
      Measurement r_thigh_length: apply=true
        MarkerPair: markers=(R.GTR R.Knee)
        BodyScale femur_r: axes=Y
        BodyScale patella_r: axes=(X Y Z)
      Measurement r_thigh_breadth: apply=true
        MarkerPair: markers=(R.Knee R.Knee.Medial)
        BodyScale femur_r: axes=(X Z)
      Measurement r_tibia_length: apply=true
        MarkerPair: markers=(R.HF R.Ankle)
        BodyScale tibia_r: axes=Y
        BodyScale talus_r: axes=Y
      Measurement r_tibia_breadth: apply=true
        MarkerPair: markers=(R.Ankle R.Ankle.Medial)
        BodyScale tibia_r: axes=(X Z)
        BodyScale talus_r: axes=(X Z)
        BodyScale calcn_r: axes=Z
        BodyScale toes_r: axes=Z
      Measurement r_foot_length: apply=true
        MarkerPair: markers=(R.Heel.Top R.MT2)
        BodyScale calcn_r: axes=X
        BodyScale toes_r: axes=X
      Measurement r_foot_height: apply=true
        MarkerPair: markers=(R.Heel.Top R.Heel.Bottom)
        BodyScale calcn_r: axes=Y
        BodyScale toes_r: axes=Y
      Measurement l_thigh_length: apply=true
        MarkerPair: markers=(L.GTR L.Knee)
        BodyScale femur_l: axes=Y
        BodyScale patella_l: axes=(X Y Z)
      Measurement l_thigh_breadth: apply=true
        MarkerPair: markers=(L.Knee L.Knee.Medial)
        BodyScale femur_l: axes=(X Z)
      Measurement l_tibia_length: apply=true
        MarkerPair: markers=(L.HF L.Ankle)
        BodyScale tibia_l: axes=Y
        BodyScale talus_l: axes=Y
      Measurement l_tibia_breadth: apply=true
        MarkerPair: markers=(L.Ankle L.Ankle.Medial)
        BodyScale tibia_l: axes=(X Z)
        BodyScale talus_l: axes=(X Z)
        BodyScale calcn_l: axes=Z
        BodyScale toes_l: axes=Z
      Measurement l_foot_length: apply=true
        MarkerPair: markers=(L.Heel.Top L.MT2)
        BodyScale calcn_l: axes=X
        BodyScale toes_l: axes=X
      Measurement l_foot_height: apply=true
        MarkerPair: markers=(L.Heel.Top L.Heel.Bottom)
        BodyScale calcn_l: axes=Y
        BodyScale toes_l: axes=Y
  MarkerPlacer:
    apply: true
    marker_file: RBDS001static.trc
    time_range: 0 0.5
    output_motion_file: RBDS001static.mot
    output_model_file: RBDS001_scaledModelAdjusted.osim
    max_marker_movement: -1
    IKTaskSet:
      IKMarkerTask R.ASIS: apply=true weight=10
      IKMarkerTask L.ASIS: apply=true weight=10
      IKMarkerTask R.PSIS: apply=true weight=10
      IKMarkerTask L.PSIS: apply=true weight=10
      IKMarkerTask R.Iliac.Crest: apply=false weight=0
      IKMarkerTask L.Iliac.Crest: apply=false weight=0
      IKMarkerTask R.GTR: apply=true weight=5
      IKMarkerTask L.GTR: apply=true weight=5
      IKMarkerTask R.Thigh.Top.Lateral: apply=false weight=0
      IKMarkerTask R.Thigh.Bottom.Lateral: apply=false weight=0
      IKMarkerTask R.Thigh.Top.Medial: apply=false weight=0
      IKMarkerTask R.Thigh.Bottom.Medial: apply=false weight=0
      IKMarkerTask L.Thigh.Top.Lateral: apply=false weight=0
      IKMarkerTask L.Thigh.Bottom.Lateral: apply=false weight=0
      IKMarkerTask L.Thigh.Top.Medial: apply=false weight=0
      IKMarkerTask L.Thigh.Bottom.Medial: apply=false weight=0
      IKMarkerTask R.Knee: apply=true weight=5
      IKMarkerTask R.Knee.Medial: apply=true weight=5
      IKMarkerTask L.Knee: apply=true weight=5
      IKMarkerTask L.Knee.Medial: apply=true weight=5
      IKMarkerTask R.HF: apply=true weight=2.5
      IKMarkerTask R.TT: apply=true weight=2.5
      IKMarkerTask L.HF: apply=true weight=2.5
      IKMarkerTask L.TT: apply=true weight=2.5
      IKMarkerTask R.Shank.Top.Lateral: apply=false weight=0
      IKMarkerTask R.Shank.Bottom.Lateral: apply=false weight=0
      IKMarkerTask R.Shank.Top.Medial: apply=false weight=0
      IKMarkerTask R.Shank.Bottom.Medial: apply=false weight=0
      IKMarkerTask L.Shank.Top.Lateral: apply=false weight=0
      IKMarkerTask L.Shank.Bottom.Lateral: apply=false weight=0
      IKMarkerTask L.Shank.Top.Medial: apply=false weight=0
      IKMarkerTask L.Shank.Bottom.Medial: apply=false weight=0
      IKMarkerTask R.Ankle: apply=true weight=10
      IKMarkerTask R.Ankle.Medial: apply=true weight=10
      IKMarkerTask L.Ankle: apply=true weight=10
      IKMarkerTask L.Ankle.Medial: apply=true weight=10
      IKMarkerTask R.Heel.Top: apply=true weight=1.25
      IKMarkerTask R.Heel.Bottom: apply=true weight=1.25
      IKMarkerTask R.Heel.Lateral: apply=false weight=0
      IKMarkerTask L.Heel.Top: apply=true weight=1.25
      IKMarkerTask L.Heel.Bottom: apply=true weight=1.25
      IKMarkerTask L.Heel.Lateral: apply=false weight=0
      IKMarkerTask R.MT1: apply=true weight=2.5
      IKMarkerTask R.MT2: apply=true weight=2.5
      IKMarkerTask R.MT5: apply=true weight=2.5
      IKMarkerTask L.MT1: apply=true weight=2.5
      IKMarkerTask L.MT2: apply=true weight=2.5
      IKMarkerTask L.MT5: apply=true weight=2.5
