# OpenSim document version 40000
AnalyzeTool:
  model_file: RBDS001_scaledModelAdjusted_sensors.osim
  replace_force_set: false
  results_directory: ./
  output_precision: 8
  initial_time: 0
  final_time: 29.99333
  solve_for_equilibrium_for_auxiliary_states: false
  maximum_number_of_integrator_steps: 20000
  maximum_integrator_step_size: 1
  minimum_integrator_step_size: 1e-8
  integrator_error_tolerance: 1e-5
  external_loads_file: RBDS001runT25_grf.xml
  coordinates_file: RBDS001runT25_ik.mot
  lowpass_cutoff_frequency_for_coordinates: 10
  AnalysisSet Analyses:
    BodyKinematics: start_time=0 end_time=29.99333 step_interval=1 in_degrees=true
        bodies=(tibia_r distalMedialTibia_sensor_r) express_results_in_body_local_frame=true
    PointKinematics: start_time=0 end_time=29.99333 step_interval=1 in_degrees=true body_name=tibia_r
        relative_to_body_name=ground point_name=KJC point=(0 0 0)
    PointKinematics: start_time=0 end_time=29.99333 step_interval=1 in_degrees=true body_name=talus_r
        relative_to_body_name=ground point_name=AJC point=(0 0 0)
